# OpenSim document version 40000
Model:
  gravity: 0 -9.8 0
  PhysicalOffsetFrame anchor1: socket_parent=/ground translation=(0.2 0.5 0) [meters]
    Brick anchor1_geom_1: half_lengths=(0.05 0.05 0.05)
  PhysicalOffsetFrame anchor2: socket_parent=/ground translation=(-0.2 0.5 0)
    Brick anchor2_geom_1: half_lengths=(0.05 0.05 0.05)
  Ground
  BodySet:
    Body Block: mass=30 [kg] mass_center=(0 0 0) inertia=(0.133 0.133 0.133 0 0 0)
      Brick Block_geom_1: half_lengths=(0.05 0.05 0.05)
  JointSet:
    PlanarJoint PelvisToPlatform: socket_parent_frame=/ground socket_child_frame=/bodyset/Block
      Coordinate Block_rotation: default_value=0 range=(-3.141593 3.141593)
      Coordinate Block_tx: default_value=0 range=(-1 1)
      Coordinate Block_ty: default_value=0.2 range=(-1 1)
  ControllerSet:
    PrescribedController LinearRamp_Controller: actuator_list=(muscle1 muscle2)
      FunctionSet ControlFunctions: PiecewiseLinearFunction(x=0 1 2 3 4 5 7, y=0 1 1 0.5 0.5 0.2 0.2)
          PiecewiseLinearFunction(x=0 1 2 3 4 5 7, y=0.8 0.1 0.5 0 1 0.2 0.2)
  ForceSet:
    DeGrooteFregly2016Muscle muscle1: min_control=0 max_control=1 max_isometric_force=4000 optimal_fiber_length=0.25
        tendon_slack_length=0.1 pennation_angle_at_optimal=0.1745329 [radians] max_contraction_velocity=10
        passive_fiber_strain_at_one_norm_force=0.55 tendon_strain_at_one_norm_force=0.04
      PathPoint point1: ground (-0.2 0.5 0)
      PathPoint point2: Block (-0.05 0.05 0)
    DeGrooteFregly2016Muscle muscle2: min_control=0 max_control=1 max_isometric_force=4000 optimal_fiber_length=0.25
        tendon_slack_length=0.1 pennation_angle_at_optimal=0.1745329 max_contraction_velocity=10
        passive_fiber_strain_at_one_norm_force=0.55 tendon_strain_at_one_norm_force=0.04
      PathPoint point1: ground (0.2 0.5 0)
      PathPoint point2: Block (0.05 0.05 0)
